// SBML level 2 version 4

model Three_ODE_CellCycle_model()
  // This is a model from the article:
  // Modeling the Cell Cycle: Why Do Certain Circuits Oscillate?
  // James E. Ferrell, Jr., Tony Yu-Chen Tsai, and Qiong Yang Cell2011; 144(6); 874-85 21414480,
  // Abstract:
  // Computational modeling and the theory of nonlinear dynamical systems allow one to not simply describe the events of the cell cycle, but also to understand why these events occur, just as the theory of gravitation allows one to understand why cannonballs fly in parabolic arcs. The simplest examples of the eukaryotic cell cycle operate like autonomous oscillators. Here, we present the basic theory of oscillatory biochemical circuits in the context of the Xenopus embryonic cell cycle. We examine Boolean models, delay differential equation models, and especially ordinary differential equation (ODE) models. For ODE models, we explore what it takes to get oscillations out of two simple types of circuits (negative feedback loops and coupled positive and negative feedback loops). Finally, we review the procedures of linear stability analysis, which allow one to determine whether a given ODE model and a particular set of kinetic parameters will produce oscillations.
  // isDescribedBy pubmed:21414480

  // Compartments:
  compartment default = 1 volume;

  // Species:
  species CDK1 in default = 0;
  species PLK1 in default = 0;
  species APC in default = 0;
  substanceOnly species $inact_CDK1 in default = 1;
  substanceOnly species $inact_PLK1 in default = 1;
  substanceOnly species $inact_APC in default = 1;

  // Parameters:
  a1 = 0.1 substance;
  a2 = 3 substance;
  a3 = 3 substance;
  b1 = 3 substance; b1 is "b2";
  b2 = 1 substance;
  b3 = 1 substance;
  K1 = 0.5 substance;
  K2 = 0.5 substance;
  K3 = 0.5 substance;
  n1 = 8 substance;
  n2 = 8 substance;
  n3 = 8 substance;

  // Reactions:
  re1: $inact_CDK1 => CDK1; a1;
  re2: CDK1 => $inact_CDK1; b1*CDK1*(APC^n1/(K1^n1 + APC^n1));  // modifiers: APC
  re3: $inact_PLK1 => PLK1; a2*(1 - PLK1)*(CDK1^n2/(K2^n2 + CDK1^n2));  // modifiers: CDK1
  re4: PLK1 => $inact_PLK1; b2*PLK1;
  re5: $inact_APC => APC; a3*(1 - APC)*(PLK1^n3/(K3^n3 + PLK1^n3));  // modifiers: PLK1
  re6: APC => $inact_APC; b3*APC;

  // Unit definitions:
  unit substance = mole;
  unit volume = litre;
  unit area = metre^2;
  unit length = metre;
  unit time = second;
end
