// SBML level 2 version 4

model oscillating_MAPK()
  // This is a sample file for CellDesigner 4.2. http://celldesigner.org PMID: 10712587 Original Model was taken from BioModels.net (BIOMD0000000010), and modified with CellDesigner 4.2.
  // biomodels.db:BIOMD0000000010
  // isDescribedBy pubmed:10712587
  // isHomologTo reactome:REACT_634
  // isVersionOf GO:0000165
  // taxonomy:8355

  // Compartments:
  compartment default = 1 volume;
  compartment uVol in default = 1 volume;

  // Species:
  species MKK in uVol = 280/uVol;  // isVersionOf uniprot:P05116
  species MKKK in uVol = 90/uVol;  // isVersionOf uniprot:P09560
  species MAPK in uVol = 280/uVol;  // isVersionOf uniprot:P26696
  species MKKK_P in uVol = 10/uVol;  // isVersionOf uniprot:P09560
  species MKK_P in uVol = 10/uVol;  // isVersionOf uniprot:P05116
  species MKK_PP in uVol = 10/uVol;  // isVersionOf uniprot:P05116
  species MAPK_P in uVol = 10/uVol;  // isVersionOf uniprot:P26696
  species MAPK_PP in uVol = 10/uVol;  // isVersionOf uniprot:P26696

  // Reactions:
  J0: MKKK => MKKK_P; V1*MKKK/((1 + (MAPK_PP/Ki)^n)*(K1 + MKKK));  // modifiers: MAPK_PP; isHomologTo reactome:REACT_525; isVersionOf ec-code:2.7.11.1; isVersionOf GO:0008349; isVersionOf GO:0000185
    V1 = 2.5; Ki = 9; n = 1; K1 = 10;
  J1: MKKK_P => MKKK; V2*MKKK_P/(KK2 + MKKK_P);  // isVersionOf ec-code:3.1.3.16; isVersionOf GO:0006470; isVersionOf GO:0051390
    V2 = 0.25; KK2 = 8;
  J2: MKK => MKK_P; k3*MKKK_P*MKK/(KK3 + MKK);  // modifiers: MKKK_P; isHomologTo reactome:REACT_614; isVersionOf ec-code:2.7.11.25; isVersionOf GO:0006468; isVersionOf GO:0004709
    k3 = 0.025; KK3 = 15;
  J3: MKK_P => MKK_PP; k4*MKKK_P*MKK_P/(KK4 + MKK_P);  // modifiers: MKKK_P; isHomologTo reactome:REACT_614; isVersionOf ec-code:2.7.11.25; isVersionOf GO:0006468; isVersionOf GO:0004709
    k4 = 0.025; KK4 = 15;
  J4: MKK_PP => MKK_P; V5*MKK_PP/(KK5 + MKK_PP);  // isVersionOf ec-code:3.1.3.16; isVersionOf GO:0006470; isVersionOf GO:0051389
    V5 = 0.75; KK5 = 15;
  J5: MKK_P => MKK; V6*MKK_P/(KK6 + MKK_P);  // isVersionOf ec-code:3.1.3.16; isVersionOf GO:0006470
    V6 = 0.75; KK6 = 15;
  J6: MAPK => MAPK_P; k7*MKK_PP*MAPK/(KK7 + MAPK);  // modifiers: MKK_PP; isHomologTo reactome:REACT_136; isHomologTo reactome:REACT_2247; isVersionOf ec-code:2.7.12.2; isVersionOf GO:0000187
    k7 = 0.025; KK7 = 15;
  J7: MAPK_P => MAPK_PP; k8*MKK_PP*MAPK_P/(KK8 + MAPK_P);  // modifiers: MKK_PP; isHomologTo reactome:REACT_136; isHomologTo reactome:REACT_2247; isVersionOf ec-code:2.7.12.2; isVersionOf GO:0000187
    k8 = 0.025; KK8 = 15;
  J8: MAPK_PP => MAPK_P; V9*MAPK_PP/(KK9 + MAPK_PP);  // isVersionOf ec-code:3.1.3.16; isVersionOf GO:0006470; isVersionOf GO:0000188
    V9 = 0.5; KK9 = 15;
  J9: MAPK_P => MAPK; V10*MAPK_P/(KK10 + MAPK_P);  // isVersionOf ec-code:3.1.3.16; isVersionOf GO:0006470
    V10 = 0.5; KK10 = 15;

  // Unit definitions:
  unit substance = mole;
  unit volume = litre;
  unit area = metre^2;
  unit length = metre;
  unit time = second;
end
